// COMSOL Multiphysics 6.3.0.290 model "mirrorModel.mph"
// Outline of the model tree

Parameters
  a_wg = 32[mm]  // Waveguide side length
  r_disk = 6.00[mm]  // Disk radius
  h_disk = 3.40[mm]  // Disk thickness
  y_cut = 3.25[mm]  // Notch center y-offset
  r_cut = 2.90[mm]  // Notch radius
  eps_r = 80  // Disk relative permittivity
  L_wg = 150[mm]  // Waveguide half-length
  PortName = 1

Variables
  var1 "Mode overlap helpers"
    E0_norm = sqrt(4*2*pi*freq*mu0_const/(ewfd.beta_1*a_wg^2))
    ovlp_TE10 = 2/a_wg^2 * intop1(Ey * sin(pi*(x+a_wg/2)/a_wg))
    ovlp_TE01 = 2/a_wg^2 * intop1(Ex * sin(pi*(y+a_wg/2)/a_wg))

Selections
  sel_p1: Box "Input face (z = -L_wg)"
    entitydim = 2
    xmin = -a_wg/2 - 0.1[mm]
    xmax = a_wg/2 + 0.1[mm]
    ymin = -a_wg/2 - 0.1[mm]
    ymax = a_wg/2 + 0.1[mm]
    zmin = -L_wg - 0.1[mm]
    zmax = -L_wg + 0.1[mm]
    condition = inside
  sel_p2: Box "Output face (z = +L_wg)"
    entitydim = 2
    xmin = -a_wg/2 - 0.1[mm]
    xmax = a_wg/2 + 0.1[mm]
    ymin = -a_wg/2 - 0.1[mm]
    ymax = a_wg/2 + 0.1[mm]
    zmin = L_wg - 0.1[mm]
    zmax = L_wg + 0.1[mm]
    condition = inside
  sel_disk: Box "Disk domain"
    entitydim = 3
    xmin = -r_disk - 0.1[mm]
    xmax = r_disk + 0.1[mm]
    ymin = -r_disk - 0.1[mm]
    ymax = r_disk + 0.1[mm]
    zmin = -h_disk/2 - 0.1[mm]
    zmax = h_disk/2 + 0.1[mm]
    condition = inside

Couplings
  intop1: Integration on selection sel_p1
  intop2: Integration on selection sel_p2

Geometry
  geom1 "Geometry 1" (3D, length unit mm)
    blk1: Block "Waveguide" | size = {a_wg, a_wg, 2*L_wg}; pos = {-a_wg/2, -a_wg/2, -L_wg}
    cyl1: Cylinder "Disk" | r = r_disk; h = h_disk; pos = {0, 0, -h_disk/2}
    cyl2: Cylinder "Notch" | r = r_cut; h = h_disk + 0.4[mm]; pos = {0, y_cut, -(h_disk + 0.4[mm])/2}
    dif1: Difference "Mirror shape" | input = cyl1; input2 = cyl2; keep = false
    fin: Finalize "Form Union"

Materials
  mat_air: Common "Air" on all domains
    def: def "Basic"
      relpermittivity = 1
      relpermeability = 1
      electricconductivity = 0
  mat_disk: Common "Disk dielectric" on selection sel_disk
    def: def "Basic"
      relpermittivity = eps_r
      relpermeability = 1
      electricconductivity = 0

Physics
  ewfd: ElectromagneticWavesFrequencyDomain on all domains
    dependent variable E = {Ex, Ey, Ez}
    PortSweepSettings.useSweep = 1
    wee1: WaveEquationElectric (default)
    pec1: PerfectElectricConductor (default)
    init1: init "Initial Values 1" (default)
    port1: Port "Port 1 – TE10" on selection sel_p1
      PortExcitation = off
      PortType = UserDefined
      beta = sqrt((2*pi*freq/c_const)^2 - (pi/a_wg)^2)
      E0 = {0, sin(pi*(x+a_wg/2)/a_wg), 0}
    port2: Port "Port 2 – TE01" on selection sel_p1
      PortExcitation = on
      PortType = UserDefined
      beta = sqrt((2*pi*freq/c_const)^2 - (pi/a_wg)^2)
      E0 = {sin(pi*(y+a_wg/2)/a_wg), 0, 0}
    port3: Port "Port 3 – TE10" on selection sel_p2
      PortExcitation = off
      PortType = UserDefined
      beta = sqrt((2*pi*freq/c_const)^2 - (pi/a_wg)^2)
      E0 = {0, sin(pi*(x+a_wg/2)/a_wg), 0}
    port4: Port "Port 4 – TE01" on selection sel_p2
      PortExcitation = off
      PortType = UserDefined
      beta = sqrt((2*pi*freq/c_const)^2 - (pi/a_wg)^2)
      E0 = {sin(pi*(y+a_wg/2)/a_wg), 0, 0}

Mesh
  mesh1 "Mesh 1"
    size: MeshSizeDefault | hmax = 8; hauto = 4
    ftet1: FreeTet "Free Tetrahedral 1" on remaining entities
      size1: Size on selection sel_disk | hmax = 1.2; hauto = 2

Studies
  study2 "TE01 excitation"
    param1: Parametric "Parametric Sweep 1" | pname = PortName; plistarr = 1 2 3 4
    freq: Frequency "Frequency Domain" | punit = GHz; plist = 5.8

Solver configurations
  sol2 "Solution 2" (study study2)
    v1: Variables "Dependent Variables 1"
    s1: Stationary "Stationary Solver 1"
      p1: Parametric
      fc1: FullyCoupled
      i1: Iterative "Suggested Iterative Solver (ewfd)"
        mg1: Multigrid
  sol3 "Parametric Solutions 1" (study study2)
  sol4 "PortName=1" (study study2)
  sol5 "PortName=2" (study study2)
  sol6 "PortName=3" (study study2)
  sol7 "PortName=4" (study study2)

Datasets
  dset3: Solution | solution = sol3
  dset4: Solution | solution = sol4
  dset5: Solution | solution = sol5
  dset6: Solution | solution = sol6
  dset7: Solution | solution = sol7
  dset8: Solution | solution = sol2

Derived values
  gev2: EvalGlobal "r_RR"
    data = dset4
    table = tbl3
    expr = abs(1/2* (withsol('sol4',(ewfd.S11),setval(freq,freq))-withsol('sol5',(ewfd.S22),setval(freq,freq))-1i*(withsol('sol4',(ewfd.S21),setval(freq,freq)) + withsol('sol5',(ewfd.S12),setval(freq,freq)) )) )^2

Tables
  tbl2: Table
    // Global Evaluation 1
    PortName | freq (GHz) | S11 (1)
    1 | 5.5 | 0.0692892-0.236955i
    1 | 5.6 | -0.156625-0.110916i
    1 | 5.7 | -0.00833514+0.00708514i
    1 | 5.8 | -0.987136+0.12855i
    1 | 5.9 | 0.354714+0.515868i
    1 | 6 | 0.502227-0.0994222i
    1 | 6.1 | 0.149635-0.443686i
    1 | 6.2 | -0.279771-0.347125i
    1 | 6.3 | -0.431793+0.0354652i
    1 | 6.4 | -0.216493+0.367096i
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
Plots
  pg1: PlotGroup3D "Electric Field (ewfd)" | data = dset3
    mslc1: Multislice | expr = ewfd.normE